// COMSOL Multiphysics 5.4.0.388 model "NanodiskScattering2.mph"
// Outline of the model tree

Parameters
  lambdaFF = 1250[nm]  // 100e-9+150e-9
  ra = 200[nm]  // Resonator basis a semiaxis
  rb = 200[nm]  // Resonator basis b semiaxis
  h0 = 400[nm]  // Resonator height
  r_pml = 1[um]  // PML internal radius
  t_pml = lambdaFF/2  // PML thickness
  I0 = 1[W/cm^2]  // Pump intensity
  E0 = sqrt(2*I0/(c_const*epsilon0_const))  // Pump electric field amplitude
  theta_pil = 0[deg]  // Resonator a axis orientation wrt x axis
  phi_Eb = 0[deg]  // Angle incidence plane normal wrt x-axis
  theta_Eb = 0[deg]  // k-angle wrt z axis
  pol_Eb = 90[deg]  // Polarization orientation (0[deg] = p, 90[deg] = s)
  n_s = 1  // Substrate refractive index
  n_c = 1  // Cladding refractive index
  z0 = 0[nm]  // z coordinate cladding/substrate interface
  Lbox = 800[nm]  // Box edge size for NTFF in RETOP
  zbox = z0+h0/2  // Box center z coordinate for NTFF in RETOP

Functions
  int1: Interpolation "nAlGaAs"
    funcname = nAlGaAs
    table = 
      {516.600000000000, 4.0334375}
      {539.100000000000, 3.9514375}
      {563.600000000000, 3.8824375}
      {590.400000000000, 3.8264375}
      {619.900000000000, 3.7704375}
      {652.500000000000, 3.7114375}
      {688.800000000000, 3.6734375}
      {729.300000000000, 3.6464375}
      {774.900000000000, 3.5474375}
      {850, 3.47035435987}
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    argunit = nm
  int2: Interpolation "kAlGaAs"
    funcs = {int1, 1}
    funcname = kAlGaAs
    table = 
      {590.400000000000, 0.17112}
      {619.900000000000, 0.12754}
      {652.500000000000, 0.09994}
      {688.800000000000, 0.08506}
      {729.300000000000, 0.0164}
      {774.900000000000, 0.01226}
      {826.600000000000, 0}
      {1000, 0}
      {2000, 0}
    argunit = nm

Variables
  var1 "ElectricField FF"
    theta_i = theta_Eb  // Incident angle
    theta_t = asin(n_c*sin(theta_i)/n_s)  // Reflected ange
    k0FF = emw.k0  // Vacuum wavenumber
    k0FFy = k0FF*sin(theta_i)*cos(phi_Eb)  // Vacuum wavevector y-component
    k0FFx = k0FF*sin(theta_i)*sin(phi_Eb)  // Vacuum wavevector x-component
    k0FFz = k0FF*cos(theta_i)  // Vacuum wavevector z-component
    rs = (n_c*cos(theta_i)-n_s*cos(theta_t))/(n_c*cos(theta_i)+n_s*cos(theta_t))  // Fresnel r-coeff s-polar
    ts = 1+rs  // Fresnel t-coeff s-polar
    rp = (n_s*cos(theta_i)-n_c*cos(theta_t))/(n_s*cos(theta_i)+n_c*cos(theta_t))  // Fresnel r-coeff p-polar
    tp = (2*n_c*cos(theta_i))/(n_s*cos(theta_i)+n_c*cos(theta_t))  // Fresnel t-coeff p-polar
    E0s = E0*sin(pol_Eb)  // Incident field amplitude s-component
    E0p = E0*cos(pol_Eb)  // Incident field amplitude p-component
  var2 "BackgroundFieldFF_Air" on selection uni1
    Es_i = E0s*phase_i  // Incident field s-component
    Ep_i = E0p*phase_i  // Incident field p-component
    Es_r = E0s*rs*phase_r  // Reflected field s-component
    Ep_r = E0p*rp*phase_r  // Reflected field p-component
    Ebx = (Es_i+Es_r)*cos(phi_Eb)-(Ep_r+Ep_i)*cos(theta_Eb)*sin(phi_Eb)  // Background field x-component
    Eby = (Es_i+Es_r)*sin(phi_Eb)+(Ep_r+Ep_i)*cos(theta_Eb)*cos(phi_Eb)  // Background field y-component
    Ebz = -(Ep_i+Ep_r)*sin(theta_Eb)  // Background field z-component
    phase_i = exp(-1j*n_c*(k0FFx*x-k0FFy*y-k0FFz*(z-z0)))  // Phase incident wave
    phase_r = exp(-1j*n_c*(k0FFx*x-k0FFy*y+k0FFz*(z-z0)))  // Phase reflected wave
  var3 "BackgroundFieldFF_Substrate" on selection sel5
    phase_t = exp(-1j*n_s*(k0FFx_t*x-k0FFy_t*y-k0FFz_t*(z-z0)))  // Phase transmitted wave
    k0FFx_t = k0FF*sin(theta_t)*sin(phi_Eb)
    k0FFy_t = k0FF*sin(theta_t)*cos(phi_Eb)
    k0FFz_t = k0FF*cos(theta_t)
    Ebx = Es_t*cos(phi_Eb)-Ep_t*cos(theta_t)*sin(phi_Eb)  // Background field x-component
    Eby = Es_t*sin(phi_Eb)+Ep_t*cos(theta_t)*cos(phi_Eb)  // Background field y-component
    Ebz = -Ep_t*sin(theta_t)  // Background field z-component
    Ep_t = E0p*tp*phase_t  // Transmitted field p-component
    Es_t = E0s*ts*phase_t  // Transmitted field s-component
  var4 "Results"
    Wmav = intV(emw.Wmav)
    Weav = intV(emw.Weav)
    sigma_sca = (nPoavFF)/I0  // Scattering Cross section
    sigma_geom = pi*ra*rb  // Geometric Cross section
    sigma_ext = sigma_sca+sigma_abs  // Extinction Cross section
    sigma_abs = intV(emw.Qh)/I0  // Absorption Cross section
    nPoavFF = intS(emw.relPoavx*emw.nx+emw.relPoavy*emw.ny+emw.relPoavz*emw.nz)  // FF Scattered Poynting Vector Integral Forward
    C_sca = sigma_sca/sigma_geom  // FF Scattering cross section Total

Selections
  sel1: Explicit "Antenna" on domains 9
  sel2: Explicit "PML" on domains 1-4, 10-13
  com1: Complement "PhysicalDomains" | entitydim = 3; input = {sel2}
  sel3: Explicit "AntennaSurf" on boundaries adjacent to domains 9
  sel4: Explicit "Air" on domains 2, 4, 6, 8, 11, 13
  sel5: Explicit "Substrate" on domains 1, 3, 5, 7, 10, 12
  uni1: Union "Air+Antenna" | entitydim = 3; input = {sel1, sel4}

Couplings
  intop1: Integration "IntV" on selection sel1 | opname = intV
  intop2: Integration "IntS" on selection sel3 | opname = intS

Coordinate systems
  pml1: PML "Perfectly Matched Layer 1" on selection sel2 | ScalingType = Spherical; r0 = {0, 0, z0}

Geometry
  geom1 "Geometry 1" (3D, length unit m)
    wp1: WorkPlane "Disk basis" | quickz = z0; unite = on
      e1: Ellipse | rot = theta_pil; semiaxes = {ra, rb}
    ext1: Extrude "Extrude Disk" | workplane = wp1; input = wp1; distance = h0
    sph1: Sphere | pos = {0, 0, z0}; layername = Layer 1; layer = t_pml; r = r_pml+t_pml
    par1: Partition "Partition Objects 1" | input = sph1; partitionwith = workplane; workplane = wp1
    blk1: Block "NTFF Box for RETOP" | pos = {0, 0, zbox}; base = center; size = {Lbox, Lbox, Lbox}
    fin: Finalize "Form Union"

Materials
  mat1: Common "AlGaAs" on selection sel1
    RefractiveIndex
      n = nAlGaAs(lambdaFF)
      ki = kAlGaAs(lambdaFF)
  mat2: Common "Air" on selection sel4
    RefractiveIndex
      n = n_c
      ki = 0
  mat3: Common "Substrate" on selection sel5
    RefractiveIndex
      n = n_s
      ki = 0

Physics
  emw: ElectromagneticWaves "Electromagnetic Waves, Frequency Domain" on all domains
    dependent variable E = {Ex, Ey, Ez}
    BackgroundField.SolveFor = scatteredField
    BackgroundField.Eb = {Ebx, Eby, Ebz}
    AnalysisMethodology.MethodologyOptions = Robust
    MeshControl.EnableMeshControl = 0
    wee1: WaveEquationElectric (default) | DisplacementFieldModel = RefractiveIndex
    pec1: PerfectElectricConductor (default)
    init1: init "Initial Values 1" (default)

Mesh
  mesh1 "Mesh 1"
    size: MeshSizeDefault | hmax = 3.25E-7; hmin = 5.85E-8; hcurve = 0.6; hnarrow = 0.5; hgrad = 1.5
    ftet1: FreeTet "Free Tetrahedral 1" on selection com1
      size1: Size on selection sel1 | hmax = lambdaFF/5/4; custom = on
      size2: Size on selection sel4 | hmax = lambdaFF/5/n_c; custom = on
      size3: Size on selection sel5 | hmax = lambdaFF/5/n_s; custom = on
    swe1: Sweep "Swept 1" on remaining entities
      dis1: Distribution on domains 1-4, 10-13

Studies
  std1 "Study 1"
    freq: Frequency "Frequency Domain" | punit = THz; plist = c_const/lambdaFF

Solver configurations
  sol1 "Solution 1" (study std1)
    v1: Variables "Dependent Variables 1"
    s1: Stationary "Stationary Solver 1"
      p1: Parametric | pname = freq; plistarr = c_const/lambdaFF; punit = THz; pcontinuationmode = no
      fc1: FullyCoupled | linsolver = i1
      i1: Iterative "Suggested Iterative Solver (emw)" | linsolver = bicgstab
        mg1: Multigrid

Datasets
  dset1: Solution | solution = sol1

Plots
  pg1: PlotGroup3D "Electric Field (emw)" | data = dset1
    mslc1: Multislice | expr = emw.normE